<!-- Generated on Jun 24, 2016 1:39:32 PM from  NESTML-model "iaf_psc_alpha_nestml".-->

<Lems xmlns="http://www.neuroml.org/lems/0.7.4"
      xmlns:xsi="http://www.w3.org/2001/XMLSchema-instance"
      xsi:schemaLocation="http://www.neuroml.org/lems/0.7.4 https://raw.githubusercontent.com/LEMS/LEMS/master/Schemas/LEMS/LEMS_v0.7.4.xsd"
      description="Generated from NESTML...">

    <Include file="units_dimensions.xml"/>

    <ComponentType name="iaf_psc_alpha_nestml"
        extends="baseCellMembPot">
        <!--Following elements are not supported or required by LEMS:-->
        <!--Not supported function call(s) found in differential equation of "V" in lines <12,4> to <12,108>.-->

        <Parameter name="I_e" dimension="current"/>

        <Parameter name="C_m" dimension="capacitance" description="Total capacitance of the cell membrane"/>

        <Parameter name="V_init" dimension="voltage" value="0mV"/>

        <Parameter name="Tau" dimension="time" value="10ms"/>

        <Parameter name="t_ref" dimension="time" value="2ms"/>
        <Parameter name="E_L" dimension="voltage" value="-70mV"/>

        <DerivedParameter name="V_reset" dimension="voltage" value="-constant70mV-E_L"/>
        <DerivedParameter name="Theta" dimension="voltage" value="-constant55mV-E_L"/>

        <Constant name="constant70mV" dimension="voltage" value="70mV"/>
        <Constant name="constant55mV" dimension="voltage" value="55mV"/>

        <Constant name="RefractoryCounts" dimension="none" value="5"/>

        <Attachments name="synapses" type="basePointCurrent"/>

        <EventPort name="ex_spikes" direction="in"/>
        <EventPort name="in_spikes" direction="in"/>
        <!--<EventPort name="currents" direction="in"/>-->

        <EventPort name="spike" direction="out"/>

        <Exposure name="iSyn" dimension="current" description="Total current due to synaptic inputs"/>

        <Dynamics>
            <StateVariable name="V" dimension="voltage"/>
            <StateVariable name="r" dimension="none"/>
            <StateVariable name="lastSpikeTime" dimension="time"/>

            <DerivedVariable name="v" dimension="voltage" value="V+E_L" exposure="v"/>

            <DerivedVariable name="iSyn" dimension="current" exposure="iSyn" select="synapses[*]/i" reduce="add" />

            <OnStart>
                <StateAssignment variable="V" value="V_init"/>
                <StateAssignment variable="r" value="0"/>
            </OnStart>

            <Regime name="refractory">
                <OnEntry>
                    <StateAssignment variable="lastSpikeTime" value="t" />
                    <StateAssignment variable="V" value="V_reset" />
                </OnEntry>
                <OnCondition test="t .gt. lastSpikeTime + t_ref">
                    <Transition regime="integrating" />
                </OnCondition>
            </Regime>

            <Regime name="integrating" initial="true">
                <TimeDerivative variable="V" value="-1/Tau * V + 1/C_m * ( I_e )" />
                <OnCondition test="V .geq. Theta">
                    <EventOut port="spike"/>
                    <Transition regime="refractory" />
                </OnCondition>
            </Regime>

        </Dynamics>
    </ComponentType>

    <iaf_psc_alpha_nestml id="iaf_psc_alpha_nestml_instance1"
            I_e="0pA" C_m="250pF" V_init="0mV" Tau="10ms" t_ref="2ms" E_L="-70mV"/>

    <iaf_psc_alpha_nestml id="iaf_psc_alpha_nestml_instance2"
            I_e="1000pA" C_m="250pF" V_init="0mV" Tau="10ms" t_ref="2ms" E_L="-70mV"/>

</Lems>
