<!-- Generated on Jun 24, 2016 1:39:33 PM.-->

<Lems>
    <Target component="sim1"/>
    <Include file="predefined_components.xml"/>
    <Include file="iaf_psc_alpha_nestml.xml"/>

    <Component id="gen1" type="spikeGenerator" period="30ms"/>
    <Component id="gen2" type="spikeGenerator" period="35ms"/>

    <Network id="net1">
        <Population id="popgen1" component="gen1" size="1"/>
        <Population id="popgen2" component="gen2" size="1"/>
        <Population id="p1" component="iaf_psc_alpha_nestml_instance1" size="1"/>
        <Population id="p2" component="iaf_psc_alpha_nestml_instance2" size="1"/>
        <PortToPortConnection from="popgen1[0]" to="p1[0]" sourceport="a" targetport="ex_spikes"/>
        <PortToPortConnection from="popgen2[0]" to="p1[0]" sourceport="a" targetport="in_spikes"/>
    </Network>

    <Simulation id="sim1" length="100ms" step="0.01ms" target="net1">
        <Display id="d0" title="Connected cells"
                 timeScale="1ms" xmin="-10" xmax="110" ymin="-90" ymax="60">
            <Line id="spiker 1: tsince (ms)" quantity="popgen1[0]/tsince" scale="1ms" timeScale="1ms" color="#3333cc" />
            <Line id="spiker 2: tsince (ms)" quantity="popgen2[0]/tsince" scale="1ms" timeScale="1ms" color="#004400" />
            <Line id="neuron1: V (mV)" quantity="p1[0]/V" scale="1mV" timeScale="1ms" color="#ff0000"/>
            <Line id="neuron1: V_m (mV)" quantity="p1[0]/V_m" scale="1mV" timeScale="1ms" color="#ffff00"/>
        </Display>
        <Display id="d1" title="Current input cell"
                 timeScale="1ms" xmin="-10" xmax="110" ymin="-90" ymax="60">
            <Line id="neuron2: V (mV)" quantity="p2[0]/V" scale="1mV" timeScale="1ms" color="#ff0000"/>
            <Line id="neuron2: V_m (mV)" quantity="p2[0]/V_m" scale="1mV" timeScale="1ms" color="#ffff00"/>
            <Line id="neuron2: r" quantity="p2[0]/r" scale="1" timeScale="1ms" color="#ffffff"/>
        </Display>
        <Display id="d2" title="Synapses"
                 timeScale="1ms" xmin="-10" xmax="110" ymin="-110" ymax="110">
            <Line id="I exc (pA)" quantity="p1[0]/I_shape_ex" scale="1pA" timeScale="1ms" color="#3333cc" />
            <Line id="I inh (pA)" quantity="p1[0]/I_shape_in" scale="1pA" timeScale="1ms" color="#004400" />
        </Display>
    </Simulation>

</Lems>
